ORIGIN := 0
elements_data := [
    176.715, 2.5, 5.12, 78.54, 31.172, 19.635, 169.355, 48.91, 170, 162.639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;
    1325.359, 3.25, 7.68, 1570.8, 374.064, 215.985, 778.524, 88.038, 867, 826.208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;
    1, 10, 2, 2, 2, 5, 1, 1, 1, 3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]
S_уст := sum(elements_data[0, i]*elements_data[2, i], i = 0 .. 27) = 4371.56
S_уст := S_уст + 5880 = 10251.6  # - because of LCD....
m := 1
k_з := 0.5
S_пп := S_уст/(m*k_з) = 20503.1
V_уст := sum(elements_data[1, i]*elements_data[2, i], i = 0 .. 27) = 28686.9
V_уст := V_уст + 82320 = 111007
V_реал := V_уст/k_з = 222014
V_м := 25785.6
V_корп := V_реал + V_м = 247799
# Оценка теплового режима и выбор способа охлаждения:
L_1 := 0.200
L_2 := 0.140
L_3 := 0.010
S_К := 2*(L_1*L_2 + L_3*(L_1 + L_2)) = 0.0628
S_З := 2*(L_1*L_2 + k_з*L_3*(L_1 + L_2)) = 0.0594
U := 12
I := 1.5
K_нагруз := 0.5
P_потр := U*I = 18
P := K_нагруз*P_потр = 9
q_З := P/S_З = 151.515
q_К := P/S_К = 143.312
Q_1 := 0.1472*q_К - 0.2962*10^-3*q_К^2 + 0.3127*10^-6*q_К^3 = 15.9325
Q_2 := 0.139*q_З - 0.1223*10^-3*q_З^2 + 0.0698*10^-6*q_З^3 = 18.4958
K_Н1 := 1.001
K_Н2 := 0.942
Q_К := Q_1*K_Н1 = 15.9484
Q_3 := Q_К + (Q_2 - Q_1)*K_Н2 = 18.363
T_с := 40
T_К := Q_К + T_с = 55.9484
T_з := Q_3 + T_с = 58.363
# Расчет механической прочности и системы виброударной защиты:
a := 180
b := 120
K_a := 22.37*sqrt(1 + 0.61*(a/b)^2 + (a/b)^4) = 60.9967
D := 13.961
m_э := 0.055
m_2 := 2.05*10^3*1.5*10^-3 + m_э/(a*10^-3*b*10^3) = 3.075
f_0 := K_a/(2*π*0.95^2)*sqrt(D/m_2) = 22.92
f_02 := nthroot((35*9.81*57/(0.003*100))^2, 3) = 1620.54
A_z := 57/(4*1620.5^2) = 5.42646e-6
