ORIGIN := 0
# Стоимость комплектующих:
parts_price := [8, 4.8, 2.08, 2.14, 1.64, 1.2, 2.21, 2.78, 2, 9.5, 7.8, 4.05, 4.7, 0.16, 0.18, 0.02, 0.02, 0.08, 0.08, 2.25, 2.15, 10, 0.1]
delivery_price := 20
parts_price_sum := sum(parts_price[0, i], i = 0 .. 22) = 67.94
Р_к := parts_price_sum + delivery_price = 87.94
# Расчет ЗП:
З_о := 18.237
Н_д := 70
Н_н := 150
Num := 500
З_д := З_о*Н_д/100 = 12.7659
Р_н := З_о*Н_н/100 = 27.3555
Н_соц := 35
Р_соц := (З_о + З_д)*Н_соц/100 = 10.851
Р_м := 0
Н_ком := 5
С_пр := Р_м + Р_к + З_о + З_д + Р_соц + Р_н = 157.149
Р_ком := С_пр*Н_ком/100 = 7.85747
С_п := С_пр + Р_ком = 165.007
Н_ре := 40
П_ед := С_п*Н_ре/100 = 66.0028
Ц_отп := С_п + П_ед = 231.01
# Расчет чистой прибыли:
Н_п := 18
Num_1 := Num = 500
Num_2 := Num_1*1.2 = 600
Num_3 := Num_2*1.2 = 720
Num_4 := Num_3*1.2 = 864
П_ч1 := Num_1*П_ед*(1 - Н_п/100) = 27061.1
П_ч2 := Num_2*П_ед*(1 - Н_п/100) = 32473.4
П_ч3 := Num_3*П_ед*(1 - Н_п/100) = 38968
П_ч4 := Num_4*П_ед*(1 - Н_п/100) = 46761.6
# Расчет инвестиций в производство нового изделия:
З_о2 := 963.3
Р_м2 := 62.65
З_д2 := З_о2*Н_д/100 = 674.31
Р_соц2 := (З_о2 + З_д2)*Н_соц/100 = 573.163
Р_н2 := З_о2*Н_н/100 = 1444.95
С_р := Р_м2 + З_о2 + З_д2 + Р_соц2 + Р_н2 = 3718.37
П_п := С_р*Н_ре/100 = 1487.35
И_раз := С_р + П_п = 5205.72
П_к := Р_к*Num = 43970
П_м := 0
И_об := 30/100*(П_к + П_м) = 13191
И := И_раз + И_об = 18396.7
# Расчет показателей экономической эффективности проекта:
Е_н := 0.12
t_р := 1
a(t) := 1/(1 + Е_н)^(t - t_р)
a_t1 := a(1) = 1
a_t2 := a(2) = 0.892857
a_t3 := a(3) = 0.797194
a_t4 := a(4) = 0.71178
П_чt1 := П_ч1*a_t1 = 27061.1
П_чt2 := П_ч2*a_t2 = 28994.1
П_чt3 := П_ч3*a_t3 = 31065.1
П_чt4 := П_ч4*a_t4 = 33284
Прир_1 := Num = 500
Прир_2 := Прир_1*1.2 = 600
Прир_3 := Прир_2*1.2 = 720
Прир_4 := Прир_3*1.2 = 864
И_об1 := Прир_1*0.3*Р_к = 13191
И_об2 := Прир_2*0.3*Р_к = 15829.2
И_об3 := Прир_3*0.3*Р_к = 18995
И_об4 := Прир_4*0.3*Р_к = 22794
И_1 := И_раз + И_об1 = 18396.7
И_2 := И_об2 = 15829.2
И_3 := И_об3 = 18995
И_4 := И_об4 = 22794
И_t1 := И_1*a_t1 = 18396.7
И_t2 := И_2*a_t2 = 14133.2
И_t3 := И_3*a_t3 = 15142.7
И_t4 := И_4*a_t4 = 16224.4
ЧДД_1 := a_t1*(П_ч1 - И_t1) = 8664.41
ЧДД_2 := a_t2*(П_ч2 - И_t2) = 16375.1
ЧДД_3 := a_t3*(П_ч3 - И_t3) = 18993.4
ЧДД_4 := a_t4*(П_ч4 - И_t4) = 21735.8
П_чср := (П_ч1 + П_ч2 + П_ч3 + П_ч4)/4 = 36316
Р_и := П_чср/(И_1 + И_2 + И_3 + И_4)*100 = 47.7748
