ORIGIN := 0
# Стоимость комплектующих:
parts_price := [
    6.7, 30, 12, 0.66, 1, 8.7, 12.5, 12, 10, 12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]
delivery_price := 10
parts_price_sum := sum(parts_price[0, i], i = 0 .. 41) = 251.04
Р_к := parts_price_sum + delivery_price = 261.04
# Расчет ЗП:
ЧТС := 230/176 = 1.30682
ВР_1 := 1.14*ЧТС = 1.48977
ПЗ_1 := ВР_1*2 = 2.97955
ВР_2 := 1.29*ЧТС = 1.6858
ПЗ_2 := ВР_2*2 = 3.37159
ВР_3 := 1.38*ЧТС = 1.80341
ПЗ_3 := ВР_3*3 = 5.41023
ВР_4 := 1.68*ЧТС = 2.19545
ПЗ_4 := ВР_4*3 = 6.58636
ВР_5 := 1.21*ЧТС = 1.58125
ПЗ_5 := ВР_5*2 = 3.1625
З_о := ПЗ_1 + ПЗ_2 + ПЗ_3 + ПЗ_4 + ПЗ_5 = 21.5102
Н_д := 60
Н_н := 170
Num := 150
З_д := З_о*Н_д/100 = 12.9061
Р_н := З_о*Н_н/100 = 36.5674
Н_соц := 35
Р_соц := (З_о + З_д)*Н_соц/100 = 12.0457
Н_ком := 3
С_пр := Р_к + З_о + З_д + Р_соц + Р_н = 344.069
Р_ком := С_пр*Н_ком/100 = 10.3221
С_п := С_пр + Р_ком = 354.392
Н_ре := 25
П_ед := С_п*Н_ре/100 = 88.5979
Ц_отп := С_п + П_ед = 442.989
# Расчет чистой прибыли:
Н_п := 18
Koeff := 0.15
Num_1 := Num = 150
Num_2 := Num_1*(1 + Koeff) = 172.5
Num_3 := Num_2*(1 + Koeff) = 198.375
Num_4 := Num_3*(1 + Koeff) = 228.131
П_ч1 := Num_1*П_ед*(1 - Н_п/100) = 10897.5
П_ч2 := Num_2*П_ед*(1 - Н_п/100) = 12532.2
П_ч3 := Num_3*П_ед*(1 - Н_п/100) = 14412
П_ч4 := Num_4*П_ед*(1 - Н_п/100) = 16573.8
# Расчет инвестиций в производство нового изделия:
КТ_1 := 30*0.69 = 20.7
КТ_3 := 5*12 = 60
КТ_5 := 10*0.44 = 4.4
КТ_2 := 500*0.02 = 10
КТ_4 := 10*1.27 = 12.7
Р_м2 := КТ_1 + КТ_2 + КТ_3 + КТ_4 + КТ_5 = 107.8
З_1 := 2.63*ЧТС*176 = 604.9
З_2 := 2.31*ЧТС*176 = 531.3
З_о2 := З_1 + З_2 = 1136.2
З_д2 := З_о2*Н_д/100 = 681.72
Р_соц2 := (З_о2 + З_д2)*Н_соц/100 = 636.272
Р_н2 := З_о2*Н_н/100 = 1931.54
С_р := Р_м2 + З_о2 + З_д2 + Р_соц2 + Р_н2 = 4493.53
И_раз := С_р = 4493.53
П_к := Р_к*Num = 39156
И_об := 15/100*П_к = 5873.4
Прир_1 := Num = 150
Прир_2 := Num_2 - Num_1 = 22.5
Прир_3 := Num_3 - Num_2 = 25.875
Прир_4 := Num_4 - Num_3 = 29.7562
И_об1 := Прир_1*0.15*Р_к = 5873.4
И_об2 := Прир_2*0.15*Р_к = 881.01
И_об3 := Прир_3*0.15*Р_к = 1013.16
И_об4 := Прир_4*0.15*Р_к = 1165.14
# Расчет показателей экономической эффективности проекта:
Е_н := 0.11
t_р := 1
a(t) := 1/(1 + Е_н)^(t - t_р)
a_t1 := a(1) = 1
a_t2 := a(2) = 0.900901
a_t3 := a(3) = 0.811622
a_t4 := a(4) = 0.731191
П_чt1 := П_ч1*a_t1 = 10897.5
П_чt2 := П_ч2*a_t2 = 11290.2
П_чt3 := П_ч3*a_t3 = 11697.1
П_чt4 := П_ч4*a_t4 = 12118.6
И_1 := И_раз + И_об1 = 10366.9
И_2 := И_об2 = 881.01
И_3 := И_об3 = 1013.16
И_4 := И_об4 = 1165.14
И_t1 := И_1*a_t1 = 10366.9
И_t2 := И_2*a_t2 = 793.703
И_t3 := И_3*a_t3 = 822.305
И_t4 := И_4*a_t4 = 851.937
ЧДД_t1 := a_t1*(П_ч1 - И_1) = 530.609
ЧДД_t2 := a_t2*(П_ч2 - И_2) = 10496.5
ЧДД_t3 := a_t3*(П_ч3 - И_3) = 10874.8
ЧДД_t4 := a_t4*(П_ч4 - И_4) = 11266.7
ЧДД_1 := ЧДД_t1 = 530.609
ЧДД_2 := ЧДД_t1 + ЧДД_t2 = 11027.2
ЧДД_3 := ЧДД_2 + ЧДД_t3 = 21901.9
ЧДД_4 := ЧДД_3 + ЧДД_t4 = 33168.6
П_чtср := (П_чt1 + П_чt2 + П_чt3 + П_чt4)/4 = 11500.9
Р_и := П_чtср/(И_t1 + И_t2 + И_t3 + И_t4)*100 = 89.6064
